*HEADING
Generated automatically by ciGEN
which is written by Phu Nguyen at Monash Univiersity.
*NODE, INPUT= trial_n4-node.inp
*ELEMENT, INPUT= trial_n4-bulk-elems.inp, TYPE=CPS3
*USER ELEMENT, TYPE=U1, NODE=4, COORDINATES=2, PROPERTIES=9, VARIABLES=4
1, 2
*ELEMENT, INPUT= trial_n4-int-elems.inp, TYPE=U1
*ELSET, ELSET=1
1,
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*ELSET, ELSET=2
277,
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*ELSET, ELSET=3
333,
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*ELSET, ELSET=4
1780,
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*SOLID SECTION, ELSET= , MATERIAL=
*MATERIAL, NAME=
*UEL PROPERTY, ELSET=

*BOUNDARY

****************************************
** HISTORY DATA
*STEP, NLGEOM=NO, INC=
*STATIC, RIKS

*BOUNDARY

*END STEP
